!/CLEAR
/INPUT,'para_gear122','txt','D:\abc\APDL0320\',, 0   !路径
/CWD,filepath
/FILNAME,friction,0
/PREP7
pi=3.14159265358979
r=0.5*m*z
rb=r*cos(angle1)
ra1=0.5*(z*m+2*ha1)
rf1=0.5*(z*m-2*c1)
ra2=0.5*(z*m-2*ha2)
rf2=0.5*(z*m+2*c2)
angle2=180.0/z
angle3=(pi/2.0/z+tan(angle1)-angle1)*180.0/pi
angle4=(pi/2.0/z+tan(angle1)-angle1)*180.0/pi

!距离
/prep7
csys,4
wprot,-angle3,0,0
K,1,0,0

*do,t,0,1,0.01
*SET,x,rb*(cos(t)+t*sin(t))
*SET,y,rb*(sin(t)-t*cos(t))
k,,x,y,0
*enddo

flst,3,101,3
*do,t,2,102
fitem,3,t
*enddo
bsplin,,p51x

KDELE,3,101,1
NUMCMP,KP

LGEN,2,1, , ,0,0,10, ,0
CSKP,11,0,2,4,3,1,1,
LGEN,2,1, , ,0,0,gap1, ,0
LGEN,2,1, , ,0,0,-gap2, ,0
LDELE,1,2 ,1 ,1
NUMCMP,KP
NUMCMP,line
circle,1,ra2
LSBL,1,6
LDELE,3,5,1 ,1
circle,1,ra2
LSBL,2,5
LDELE,1, , ,1
LDELE,3,4,1 ,1
LDELE,6,7,1 ,1
NUMCMP,KP
NUMCMP,line
csys,1
gky1=ky(4)
gky2=ky(5)
gky=gky1-gky2
LDELE,1,2,1,1
!建立内毂模型
WPCSYS,-1,0
csys,4
wprot,-angle3,0,0
K,1,0,0

*do,t,0,1,0.01
*SET,x,rb*(cos(t)+t*sin(t))
*SET,y,rb*(sin(t)-t*cos(t))
k,,x,y,0
*enddo

flst,3,101,3
*do,t,2,102
fitem,3,t
*enddo
bsplin,,p51x

KDELE,3,101,1
NUMCMP,KP

!用于调整齿侧间隙
LGEN,2,1, , ,0,0,10, ,0
CSKP,11,0,2,4,3,1,1,
LGEN,2,1, , ,0,0,gap1, ,0
ldele,1,2,1
kdele,2,5,1
NUMCMP,KP
NUMCMP,line

CSYS,4
wprot,angle4,0,0
LSYMM,Y,1, , , ,0,0

circle,1,ra1
LSBL,1,6
LSBL,2,3
ldele,4
ldele,5
ldele,6
ldele,8
kdele,6,9,1
kdele,3
kdele,5
NUMCMP,line
NUMCMP,KP

circle,1,rf1
LSBL,1,3
LSBL,2,6
ldele,4
ldele,5
ldele,1
ldele,7
kdele,7,9,1
kdele,2
kdele,3
NUMCMP,line
NUMCMP,KP

larc,2,3,1,ra1
LGEN,2,1, 3,1 , , , , ,0
ldele,1,3,1,1
NUMCMP,line
NUMCMP,KP

circle,1,rf1
circle,1,rd1
circle,1,rf1-1.2
LSTR,       5,       1
LSTR,       1,       3
LSBL,       4,      16
LSBL,       7,      17
LDELE,4, , ,1
LDELE,18, , ,1
CSYS,1
LSEL,S,LOC,Y,20,50
WPCSYS,-1,0
wpro,,90.000000,
wprot,,,180/z
LSBW,all
ALLSEL,ALL
CSYS,1
LSEL,S,LOC,Y,-20,-50
WPCSYS,-1,0
wpro,,90.000000,
wprot,,,-180/z
LSBW,all
ALLSEL,ALL
CSYS,1
LSEL,S,LOC,Y,30,330
LDELE,all, , ,1
ALLSEL,ALL
NUMCMP,line
NUMCMP,KP
LCOMB,6, 7,0
LCOMB,8, 9,0
lfillt,2,4,rff1
lfillt,1,5,rff1
LSTR,1,9
LSTR,9,6
LSTR,11,12
LSTR,12,10
CSYS,1
LSEL,U,LOC,X,rd1-1,rf1-2
AL,ALL
ALLSEL,ALL
LPLOT
LSEL,U,LOC,X,rf1-1,ra1+1
AL,ALL
ALLSEL,ALL
CSYS,4
WPCSYS,-1,0
VOFFST,1,-b1
VOFFST,2,b1
BOPTN,KEEP,0
BOPTN,NWARN,0
BOPTN,VERS,RV52
BTOL,1e-004,
VGLUE,ALL
NUMCMP,line
NUMCMP,KP
NUMCMP,AREA
NUMCMP,VOLU
VGEN,2,1, 2,1 , , , , ,0 !复制，重排线号
Vdele,1,2,1,1
NUMCMP,line
NUMCMP,KP
NUMCMP,VOLU
VGLUE,ALL
NUMCMP,KP
NUMCMP,line
NUMCMP,AREA
NUMCMP,VOLU

!建立摩擦片

VSEL,U, , ,ALL
ALLSEL,BELOW,VOLU
K, ,,,,
*GET,kzx,kp,,NUM,MIN
KSEL,U, , , kzx
WPCSYS,-1,0
wprot,-angle3,0,0
*do,t,0,1,0.01
*SET,x,rb*(cos(t)+t*sin(t))
*SET,y,rb*(sin(t)-t*cos(t))
k,,x,y,0
*enddo
*GET,kpnub1,kp,,NUM,MIN
*GET,kpnub2,kp,,NUM,Max
flst,3,101,3
*do,t,kpnub1,kpnub2
fitem,3,t
*enddo
bsplin,,p51x
KDELE,kpnub1+1,kpnub2-1,1
NUMCMP,KP
*GET,lnub,line,,NUM,max
CSYS,11
LGEN,2,lnub, , ,0,0,-gap2, ,0
ldele,lnub
kdele,kpnub1,kpnub1+1,1
NUMCMP,KP
NUMCMP,line
CSYS,4
wprot,angle4,0,0
LSYMM,Y,lnub, , , ,0,0
KSEL,A, , , kzx
circle,kzx,ra2
LSBL,lnub,lnub+5
LSBL,lnub+1,lnub+2
ldele,lnub
ldele,lnub+6
ldele,lnub+3
ldele,lnub+4
kdele,kpnub1+5,kpnub1+7,1
kdele,kpnub1+2
kdele,kpnub1
NUMCMP,line
NUMCMP,KP
circle,kzx,rf2
LSBL,lnub,lnub+2
LSBL,lnub+1,lnub+5
ldele,lnub
ldele,lnub+6
ldele,lnub+3
ldele,lnub+4
ldele,1
ldele,7
kdele,kpnub1+5,kpnub1+7,1
kdele,kpnub1+1
kdele,kpnub1
NUMCMP,line
NUMCMP,KP
larc,kpnub1+2,kpnub1+3,kzx,rf2
LGEN,2,lnub,lnub+2,1 , , , , ,0
ldele,lnub,lnub+2,1,1
NUMCMP,line
NUMCMP,KP
wprot,angle2,0,0
LSYMM,Y,lnub,lnub+2,1 , ,0,0
circle,kzx,rdc
circle,kzx,rd2
CSYS,1
LSEL,S,LOC,X,rf2
LSEL,R,LOC,Y,0,0.1
WPCSYS,-1,0
wpro,,90.000000,
LSBW,lnub+2     !出错LSBW,all
ALLSEL,ALL
*GET,VMN1,VOLU,,NUM,MIN
*GET,VMX1,VOLU,,NUM,Max
CSYS,1
LSEL,S,LOC,X,rf2
LSEL,A,LOC,X,rdc
LSEL,A,LOC,X,rdc+1.2
LSEL,A,LOC,X,rd2
LSEL,R,LOC,Y,angle4,60
WPCSYS,-1,0
wprot,2*angle2,0,0
wpro,,90.000000,
LSBW,lnub+5     !出错LSBW,all
LSBW,lnub+6
LSBW,lnub+10
ALLSEL,ALL
NUMCMP,line
NUMCMP,KP
LSEL,S,,,lnub,lnub+23,1
CSYS,1
LSEL,U,LOC,Y,0,2*angle2
LDELE,all, , ,1
NUMCMP,line
NUMCMP,KP
LSEL,S,,,lnub,lnub+6,1
larc,kpnub1,kpnub1+2,kzx,ra2
lfillt,lnub,lnub+4,rff2     !倒角
lfillt,lnub+1,lnub+5,rff2
LSTR,kpnub1+7,kpnub1+8
LSTR,kpnub1+8,kpnub1+9
LSTR,kpnub1+5,kpnub1+4
LSTR,kpnub1+4,kpnub1+6
CSYS,1
LSEL,R,LOC,X,ra2,rdc
AL,ALL    !已定义的线生成面
ALLSEL,ALL  !选择所有实体：点线面体
LSEL,s,LOC,X,rdc,rd2
AL,ALL
ALLSEL,ALL
CSYS,1

ASEL,s,LOC,X,rdc,rd2
*GET,AC2,AREA,,NUM,MIN
VOFFST,AC2,-(bx+bc)
*if,bc,ne,0,then
VOFFST,AC2,bc
*endif

ALLSEL,ALL
ASEL,s,LOC,X,rf2-1,rd2
*GET,AC1,AREA,,NUM,MIN
ALLSEL,ALL
CSYS,4
WPCSYS,-1,0
VOFFST,AC2-1,bx
ALLSEL,ALL
CSYS,1
VSEL,s,LOC,X,ra2,rd2
VSEL,R,VOLU, ,VMX1+1,VMX1+3
ALLSEL,BELOW,VOLU
wpoff,,,bx
VSBW,ALL
VGLUE,ALL
VGEN, ,ALL, , , , ,BC+0.5, , ,1
NUMCMP,line
NUMCMP,KP
NUMCMP,AREA
NUMCMP,VOLU
*GET,VMN2,VOLU,,NUM,MIN
*GET,VMX2,VOLU,,NUM,Max

!定义单元类型
ET,1,SOLID185
ET,10,SHELL181

!定义内毂材料参数
MPTEMP,,,,,,,,
MPTEMP,1,0
MPDATA,EX,1,,ex1
MPDATA,PRXY,1,,prxy1
MPTEMP,,,,,,,,
MPTEMP,1,0
MPDATA,DENS,1,,dens1

!定义芯板材料参数
MPTEMP,,,,,,,,
MPTEMP,1,0
MPDATA,EX,2,,ex2
MPDATA,PRXY,2,,prxy2
MPTEMP,,,,,,,,
MPTEMP,1,0
MPDATA,DENS,2,,dens2

!定义摩擦层材料参数
MPTEMP,,,,,,,,
MPTEMP,1,0
MPDATA,EX,3,,ex3
MPDATA,PRXY,3,,prxy3
MPTEMP,,,,,,,,
MPTEMP,1,0
MPDATA,DENS,3,,dens3

!定义镀层材料参数
MPTEMP,,,,,,,,
MPTEMP,1,0
MPDATA,EX,4,,ex4
MPDATA,PRXY,4,,prxy4
MPTEMP,,,,,,,,
MPTEMP,1,0
MPDATA,DENS,4,,dens4

!!!对内毂进行网格划分
VSEL,S,,,1,6,1
ALLSEL,BELOW,VOLU
CSYS,1
LSEL,R,LOC,X,rf1-1,ra1+1
LESIZE,ALL,0.5, , , ,1, , ,1,
ALLSEL,ALL
VSEL,S,,,1,6,1
ALLSEL,BELOW,VOLU
LSEL,R,LOC,X,rf1-1.2
LESIZE,ALL,1, , , ,1, , ,1,
ALLSEL,ALL
VSEL,S,,,1,6,1
ALLSEL,BELOW,VOLU
LSEL,R,LOC,X,0,rd1+1
LESIZE,ALL,3, , , ,1, , ,1,
ALLSEL,ALL
VSEL,S,,,1,6,1
ALLSEL,BELOW,VOLU
LSEL,R,LOC,X,rd1+1,rf1-1.3
LESIZE,ALL,2, , , ,1, , ,1,
ALLSEL,ALL
VSEL,S,,,1,6,1
ALLSEL,BELOW,VOLU
LSEL,R,LOC,Z,0.001,b1-0.001
LESIZE,ALL,1.2, , , ,1, , ,1,
ALLSEL,ALL
VSEL,S,,,1,6,1
ALLSEL,BELOW,VOLU

TYPE,   10
MAT,       1
ASEL,S,LOC,X,rd1+1,rf1-1.3
ASEL,R,LOC,Z,0
AMESH,ALL

TYPE,   1   !指定单元类型号
MAT,       1    !指定单元材料编号
VSWEEP,1
VSWEEP,2


!对摩擦片进行网格划分
ALLSEL,ALL          !网格划分尺寸设定
VSEL,U, , ,1 ,VMX1,1
ALLSEL,BELOW,VOLU
CSYS,1
LSEL,R,LOC,X,ra2-1,rdc-0.1
LESIZE,ALL,0.5, , , ,1, , ,1,
ALLSEL,ALL
VSEL,U, , ,1,VMX1,1
ALLSEL,BELOW,VOLU
CSYS,1
LSEL,R,LOC,X,rdc-0.01,rdc+0.01
LESIZE,ALL,0.5, , , ,1, , ,1,
ALLSEL,ALL
VSEL,U, , ,1 ,VMX1,1
ALLSEL,BELOW,VOLU
CSYS,1
LSEL,R,LOC,X,rd2
LESIZE,ALL,0.5, , , ,1, , ,1,
ALLSEL,ALL
VSEL,U, , ,1 ,VMX1,1
ALLSEL,BELOW,VOLU
LSEL,R,LOC,X,rdc+1,rd2-1
LESIZE,ALL,1, , , ,1, , ,1,

ALLSEL,ALL
VSEL,U, , ,1 ,VMX1,1
ALLSEL,BELOW,VOLU
CSYS,1
LSEL,R,LOC,Z,bc+0.6,bc+bx+0.4
LESIZE,ALL,1.2, , , ,1, , ,1,
TYPE,   1
MAT,       2
VSWEEP,VMN2
VSEL,R,LOC,Z,bc+0.6,bc+bx+0.4
ALLSEL,BELOW,VOLU
VSEL,R,LOC,X,rdc,rd2
ALLSEL,BELOW,VOLU
ASEL,R,LOC,Z,bc+bx+0.5
TYPE,   10
REAL,       1
MAT,       2
AMESH,ALL
ALLSEL,ALL
VSEL,U, , ,1 ,VMX1,1
ALLSEL,BELOW,VOLU
TYPE,   1
MAT,       2
*if,bc,ne,0,then
VSWEEP,VMX2-1
*else
 VSWEEP,VMX2
*endif
*if,bc,ne,0,then
TYPE,   1
MAT,       3
VSWEEP,VMX2
VSWEEP,VMN2+1
*endif

ALLSEL,ALL
NUMCMP,VOLU
VSEL,U,,,1,2,1
ALLSEL,BELOW,VOLU
CSYS,4
WPCSYS,-1,0
VSYMM,Y,VMN2,VMX2,1 , ,0,0
wprot,2*angle2,0,0
VSYMM,Y,VMN2,VMX2+10,1 , ,0,0
ALLSEL,ALL
VSEL,S,,,1,2,1
ALLSEL,BELOW,VOLU
CSYS,1
VGEN, ,1,2, 1, ,gky, , , ,1
ALLSEL,ALL
VSEL,S,,,1,2,1
ALLSEL,BELOW,VOLU
CSYS,4
VGEN, ,1,2, 1, , ,BC+0.5-(B1-BX)/2, , ,1


!创建内毂约束节点集合
ALLSEL,ALL
ALLSEL,BELOW,VOLU
NSEL,S,LOC,x,rd1
CM,FORCE,NODE
!创建摩擦片约束节点集合
ALLSEL,ALL
ALLSEL,BELOW,VOLU
ASEL,S,LOC,x,rd2
NSLA,S,1
CM,yueshu,NODE
!创建内毂齿面节点集合
ALLSEL,ALL
VSEL,S,,,1,2,1
ALLSEL,BELOW,VOLU
ASEL,S,,,10,11,1
ASEL,A,,,3,4,1
NSLA,S,1
CM,NEIGU_CHIMIAN,NODE
!创建摩擦片齿面节点集合
ALLSEL,ALL
VSEL,U,,,1,2,1
ALLSEL,BELOW,VOLU
*if,bc,ne,0,then
ASEL,S,,,31,32,1
ASEL,A,,,58,59,1
*else
ASEL,S,,,25,26,1
ASEL,A,,,43,44,1
*endif
NSLA,S,1
CM,mocapian_CHIMIAN,NODE
!!!边界条件设置
!建立接触
CM,_NODECM,NODE
CM,_ELEMCM,ELEM
CM,_KPCM,KP
CM,_LINECM,LINE
CM,_AREACM,AREA
CM,_VOLUCM,VOLU
/GSAV,cwz,gsav,,temp
MP,MU,1,
MAT,1
R,3
REAL,3
ET,2,170
ET,3,174
KEYOPT,3,9,0
KEYOPT,3,10,2
R,3,
RMORE,
RMORE,,0
RMORE,0
! Generate the target surface
NSEL,S,,,NEIGU_CHIMIAN
CM,_TARGET,NODE
TYPE,2
ESLN,S,0
ESURF
CMSEL,S,_ELEMCM
! Generate the contact surface
NSEL,S,,,MOCAPIAN_CHIMIAN
CM,_CONTACT,NODE
TYPE,3
ESLN,S,0
ESURF
ALLSEL
ESEL,ALL
ESEL,S,TYPE,,2
ESEL,A,TYPE,,3
ESEL,R,REAL,,3
/PSYMB,ESYS,1
/PNUM,TYPE,1
/NUM,1
EPLOT
ESEL,ALL
ESEL,S,TYPE,,2
ESEL,A,TYPE,,3
ESEL,R,REAL,,3
CMSEL,A,_NODECM
CMDEL,_NODECM
CMSEL,A,_ELEMCM
CMDEL,_ELEMCM
CMSEL,S,_KPCM
CMDEL,_KPCM
CMSEL,S,_LINECM
CMDEL,_LINECM
CMSEL,S,_AREACM
CMDEL,_AREACM
CMSEL,S,_VOLUCM
CMDEL,_VOLUCM
/GRES,cwz,gsav
CMDEL,_TARGET
CMDEL,_CONTACT
/MREP,EPLOT

!*
KEYOPT,3,1,0
KEYOPT,3,2,0
KEYOPT,3,4,0
KEYOPT,3,5,0
KEYOPT,3,6,0
KEYOPT,3,7,0
KEYOPT,3,8,0
KEYOPT,3,9,3
KEYOPT,3,10,2
KEYOPT,3,11,0
KEYOPT,3,12,0
KEYOPT,3,14,0
KEYOPT,3,15,0
KEYOPT,3,16,0
!*
R,3,0,0,0, 0,0,0
RMORE,0,0,0, 0.005,0,0
RMORE,0,,, ,,
RMORE,,,0, 0,0,
RMORE,,,,,,
RMORE,,,,,

!摩擦片约束的施加
CMSEL,S,YUESHU
D,ALL,ALL

ALLSEL,ALL
VSEL,U,,,1,2,1
ALLSEL,BELOW,VOLU
*if,bc,ne,0,then
ASEL,S,,,107
ASEL,A,,,102
ASEL,A,,,121
ASEL,A,,,125
ASEL,A,,,98
ASEL,A,,,20
ASEL,A,,,71
ASEL,A,,,67
ASEL,A,,,48
ASEL,A,,,53
ASEL,A,,,51
ASEL,A,,,25
ASEL,A,,,78
ASEL,A,,,105
ASEL,A,,,124
ASEL,A,,,103
ASEL,A,,,108
ASEL,A,,,97
ASEL,A,,,76
ASEL,A,,,81
ASEL,A,,,42
ASEL,A,,,41
ASEL,A,,,28
ASEL,A,,,70
ASEL,A,,,49
ASEL,A,,,54
*else
ASEL,S,,,70
ASEL,A,,,72
ASEL,A,,,53
ASEL,A,,,20
ASEL,A,,,36
ASEL,A,,,69
ASEL,A,,,52
ASEL,A,,,19
ASEL,A,,,35
ASEL,A,,,38
ASEL,A,,,39
ASEL,A,,,23
ASEL,A,,,56
ASEL,A,,,73
*endif
NSLA,S,1
D,ALL,ALL

ALLSEL,ALL
VSEL,S,,,1,2,1
ALLSEL,BELOW,VOLU
ASEL,S,,,16
ASEL,A,,,17
ASEL,A,,,13
ASEL,A,,,14
NSLA,S,1
CSYS,1
NROTAT,ALL
D,ALL, , , , , ,UX,UZ, , , ,
ALLSEL,ALL

!内毂施加载荷
CMSEL,S,FORCE
CSYS,1
NROTAT,ALL
D,ALL, , , , , ,UX,UZ, , , ,
ALLSEL,ALL

ESEL,S,TYPE,,10
ACLEAR,ALL
ETDEL,10
ALLSEL,ALL

VSEL,U,,,1,2,1
ALLSEL,BELOW,VOLU
EPLOT
NUMMRG,NODE, ,0.1, ,LOW
ALLSEL,ALL
SAVE
FINISH

*cfopen,MAX_STRESS,csv,,loc
*vwrite,
(/'   ')
*cfclos

*create,ttb,mac
*dim,load1,,n1,2
*vread,load1(1,1),force+,txt,,jik,2,n1
(F16.11,F16.11)
*end
ttb
*create,ttb,mac
*dim,load2,,n2,2
*vread,load2(1,1),force-,txt,,jik,2,n2
(F16.11,F17.11)
*end
ttb

/RGB,INDEX,100,100,100, 0
/RGB,INDEX, 80, 80, 80,13
/RGB,INDEX, 60, 60, 60,14
/RGB,INDEX, 0, 0, 0,15
/REPLOT
FINISH

*do,t,1,n1,1
/prep7
!内毂施加载荷
ALLSEL,ALL

PSTRES,1
CMSEL,S,FORCE
*GET,NGNUM,NODE,,COUNT
Fs=load1(t,2)
F,ALL,FY,Fs*Z*m/2/rd1/NGNUM
ALLSEL,ALL
SAVE
FINISH

!求解
/SOLU
SOLVE
FINISH

/POST1             !输出最大应力值
/EFACET,1
PLNSOL, S,EQV, 0,1.0
ALLSEL,ALL
ALLSEL,BELOW,VOLU
ASEL,S,LOC,x,rf2
NSLA,S,1
nsort,s,y,0,0,all
*get,max_poi,sort,0,imax
*GET,max_x,NODE,max_poi,S,X
*GET,max_y,NODE,max_poi,S,Y
*cfopen,MAX_STRESS,csv,,append
loadtime=load1(t,1)
*vwrite,loadtime,max_x,max_y,max_poi
(F20.11,F15.5,F15.5,F10.0)
finish
*cfclos
*enddo

*cfopen,MIN_STRESS,csv,,loc
*vwrite,
(/'   ')
*cfclos

*do,t,1,n2,1
/prep7
!内毂施加载荷
ALLSEL,ALL

PSTRES,1
CMSEL,S,FORCE
*GET,NGNUM,NODE,,COUNT
Fs=load2(t,2)
F,ALL,FY,-Fs*Z*m/2/rd1/NGNUM
ALLSEL,ALL
SAVE
FINISH

!求解
/SOLU
SOLVE
FINISH

/POST1             !输出最大应力值
/EFACET,1
PLNSOL, S,EQV, 0,1.0
ALLSEL,ALL
ALLSEL,BELOW,VOLU
ASEL,S,LOC,x,rf2
NSLA,S,1
nsort,s,y,0,0,all
*get,min_poi,sort,0,imin
*GET,min_x,NODE,min_poi,S,X
*GET,min_y,NODE,min_poi,S,Y
*cfopen,MIN_STRESS,csv,,append
loadtime=load2(t,1)
*vwrite,loadtime,min_x,min_y,min_poi
(F20.11,F15.5,F15.5,F10.0)
finish
*cfclos
*enddo
FINISH
save
